l1 := 0.5
w := 0.1
R := 0.15
μ := 0.998
Ukm := 10
mg := 2000
h := 0.25
fi := (π*30)/180
m := 200
U := Ukm*1000/3600 = 2.77778
m := 200
Ukm_pand := 0.5
Wtest := 10.3
Wlinear := U/R = 18.5185
μ2 := 0.01
μ2 := 0.01
Utest := Wtest*R = 1.545
U_pand := Ukm_pand*1000/3600 = 0.138889
t := 5
Ukmtest := Utest*3600/1000 = 5.562
ε := Wlinear/t = 3.7037
ddotX := U/t = 0.555556
Wlinear_pand := U_pand/R = 0.925926
m_wheel := 1.5
t := 5
ddotX_pand := U_pand/t = 0.0277778
Jo := 0.5*m_wheel*R^2*ε = 0.0625
ε_pand := Wlinear_pand/t = 0.185185
Jk := (m*ddotX)*R = 16.6667
Jo_pand := 0.5*m_wheel*R^2*ε_pand = 0.003125
m_wheel := 1.5
Mk := mg*μ2 = 20
Jk_pand := (m*ddotX_pand + mg*sin(fi))*R = 150.833
n := 0.65
Mk_pand := mg*cos(fi)*μ2 = 17.3205
Md := Jo + Jk + Mk = 36.7292
Md_pand := Jo_pand + Jk_pand + Mk_pand = 168.157
Nd := Md*Wlinear = 680.17
Nd_pand := Md_pand*Wlinear_pand = 155.701
Nd_real := 1.2*Nd/n = 1255.7
Nd_pand_real := 1.2*Nd_pand/n = 287.448
M1d := Md/4 = 9.18229
N1_pand := Nd_pand_real/6 = 47.908
N1m := Nd_real/4 = 313.925
M1_pand := Md_pand/6 = 28.0262
Mp := 0.5*l1*mg = 500
Nd := Mp*0.3 = 150
Np_real := 1.2*Nd/0.35 = 514.286
Np_real1 := Np_real/4 = 128.571
